*Heading
** Job name: RC5kgCWP Model name: Model-1
** Generated by: Abaqus/CAE 2021
*Preprint, echo=NO, model=NO, history=NO, contact=NO
**
** PARTS
**
*Part, name=RC-Slab
*End Part
**
**
** ASSEMBLY
**
*Assembly, name=Assembly
**
*Instance, name=RC-Slab-1, part=RC-Slab
         -1.,        -0.15,          -1.
*Node
      1,           2.,  0.150000006,           2.
      2,           2.,  0.100000001,           2.
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*Element, type=C3D8R
   1,  165,  166,  170,  169,    1,    2,    6,    5
   2,  166,  167,  171,  170,    2,    3,    7,    6
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*Nset, nset=_PickedSet2, internal, generate
    1,  6724,     1
*Elset, elset=_PickedSet2, internal, generate
    1,  4800,     1
** Section: RC-Slab
*Solid Section, elset=_PickedSet2, controls=EC-1, material=CDP_Tool
,
*End Instance
**
*Node
      1,           0.,           2.,           0.
*Nset, nset=RF2, instance=RC-Slab-1
    1,    2,    3,    4,    5,    6
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*Elset, elset=RF2, instance=RC-Slab-1
    1,    2,    3,    4,    5,    6
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*Nset, nset=Set-2, instance=RC-Slab-1
 3361,
*Nset, nset=_PickedSet6, internal
 1,
*Nset, nset=_PickedSet7, internal, instance=RC-Slab-1
    1,    2,    3,    4,    5,    6
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*Elset, elset=_PickedSet7, internal, instance=RC-Slab-1
    1,    2,    3,    4,    5,    6
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*Nset, nset=_PickedSet11, internal
 1,
*Elset, elset=__PickedSurf10_S6, internal, instance=RC-Slab-1, generate
    1,  4798,     3
*Surface, type=ELEMENT, name=_PickedSurf10, internal
__PickedSurf10_S6, S6
*End Assembly
**
** ELEMENT CONTROLS
**
*Section Controls, name=EC-1, ELEMENT DELETION=YES
1., 1., 1.
**
** MATERIALS
**
** ===================
** DamageStartCompression: 0.0001
** DamageStartTension: 0.0
** Ect: 36764.48285354899
** GF: 147.61736910785203
** Kc: 0.666
** MaterialName: Test
** Mu: 0.0001
** alphaDamping: 0.0
** betaDamping: 0.0
** compressionRecovery: 1.0
** compressionStressStrainOveride: None
** concfc: 50.0
** concfct: 3.6248283707881637
** concfctRatio: None
** concreteCompressionEnhancement: 1.0
** concreteModel: Concrete Damaged Plasticity
** crackRatioCompression: 0.5
** crackRatioTension: 0.2
** dilationAngle: 30.0
** eFlow: 0.1
** eb0ec0: 1.16
** ec1: 0.0024396940799999997
** includeCrushing: Crushing
** kEci_Ec1: 1.794754304
** maxDamageCompression: 1.0
** maxDamageTension: 1.0
** poissonsRatio: 0.2
** rho: 2400.0
** tensionRecovery: 0.0
** ===================
**
*Material, name=CDP_Tool
*Damping
*Density
2400.,
*Elastic
 3.56426e+10, 0.2
*Concrete Damaged Plasticity
30.,    0.1,   1.16,  0.666, 0.0001
*Concrete Compression Hardening
 7.52058e+06,          0.
  1.7348e+07, 2.42773e-05
 1.96379e+07, 3.50315e-05
 2.18583e+07, 4.77349e-05
 2.40079e+07, 6.24267e-05
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     500000.,  0.00814697
*Concrete Tension Stiffening, type=DISPLACEMENT
 3.62483e+06,          0.
 3.04486e+06, 2.44167e-05
 2.46488e+06, 4.88334e-05
 1.88491e+06, 7.32501e-05
 1.30494e+06, 9.76668e-05
     724966., 0.000122083
     690530., 0.000131194
     656094., 0.000140305
     621658., 0.000149416
     587222., 0.000158527
     552786., 0.000167638
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     36248.3, 0.000581225
*Concrete Compression Damage
        0.,          0.
        0., 2.42773e-05
        0., 3.50315e-05
        0., 4.77349e-05
        0., 6.24267e-05
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  0.972796,  0.00814697
*Concrete Tension Damage, type=DISPLACEMENT
       0.,          0.
 0.180505, 2.44167e-05
 0.340507, 4.88334e-05
 0.483312, 7.32501e-05
 0.611551, 9.76668e-05
 0.727345, 0.000122083
 0.745452, 0.000131194
 0.761958, 0.000140305
 0.777066, 0.000149416
 0.790946, 0.000158527
 0.803742, 0.000167638
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 0.956486, 0.000581225
**
** INTERACTION PROPERTIES
**
*Incident Wave Interaction Property, name=IntProp-1, type=AIR BLAST
*CONWEP Charge Property
5., 1.
1., 1., 1.
**
** BOUNDARY CONDITIONS
**
** Name: BC-1 Type: Symmetry/Antisymmetry/Encastre
*Boundary
_PickedSet7, ENCASTRE
** ----------------------------------------------------------------
**
** STEP: Step-1
**
*Step, name=Step-1, nlgeom=YES
*Dynamic, Explicit
, 0.1
*Bulk Viscosity
0.06, 1.2
**
** INTERACTIONS
**
** Interaction: Int-1
*Incident Wave Interaction, CONWEP, property=IntProp-1
_PickedSurf10, _PickedSet11,   , 0., 1.
**
** OUTPUT REQUESTS
**
*Restart, write, number interval=1, time marks=NO
**
** FIELD OUTPUT: F-Output-1
**
*Output, field, number interval=1000
*Node Output
A, RF, U, V
*Element Output, directions=YES
DAMAGEC, DAMAGET, EVF, LE, PE, PEEQ, PEEQVAVG, PEVAVG, S, SVAVG
*Contact Output
CSDMG, CSTRESS
**
** HISTORY OUTPUT: H-Output-1
**
*Output, history, variable=PRESELECT
*End Step
